*Heading
** Job name: Cohesive_Trapi Model name: Model-1
** Generated by: Abaqus/CAE 2020
*Preprint, echo=NO, model=NO, history=NO, contact=NO
**
** PARTS
**
*Part, name=Part-1
*Node
      1,        23.75,        -1.25
      2,         3.75,        -1.25
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*Element, type=CPS4
   1,    1,   11,  417,  213
   2,   11,   12,  418,  417
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*Element, type=COH2D4
1681,   2,  76, 279,   7
1682,  76,  75, 278, 279
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*Nset, nset=Set-1, generate
    1,  3570,     1
*Elset, elset=Set-1
    1,    2,    3,    4,    5,    6
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*Nset, nset=Set-2
   1,   2,   6,   7,  11,  12
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*Elset, elset=Set-2, generate
 1681,  1747,     1
*Nset, nset=Set-15
   1,   2,   6,   7,  11,  12
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*Elset, elset=Set-15, generate
 1681,  1747,     1
*Nset, nset=Set-17, generate
    1,  3570,     1
*Elset, elset=Set-17
    1,    2,    3,    4,    5,    6
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*Nset, nset=Set-18
   1,   2,   6,   7,  11,  12
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*Elset, elset=Set-18, generate
 1681,  1747,     1
** Section: Section-1
*Solid Section, elset=Set-17, material=Rubber
1.2,
** Section: Section-2
*Cohesive Section, elset=Set-18, controls=EC-1, material=Trapi, response=TRACTION SEPARATION
, 1.2
*End Part
**
**
** ASSEMBLY
**
*Assembly, name=Assembly
**
*Instance, name=Part-1-1, part=Part-1
*End Instance
**
*Node
      1,        11.25,          19.,           0.
*Nset, nset=RefP
 1,
*Nset, nset=Set-1, instance=Part-1-1
   4,   5, 112, 113, 114, 115
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*Elset, elset=Set-1, instance=Part-1-1, generate
 1597,  1680,     1
*Nset, nset=Set-6, instance=Part-1-1
   4,   5, 112, 113, 114, 115
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*Elset, elset=Set-6, instance=Part-1-1, generate
 1597,  1680,     1
*Nset, nset=Set-7
 1,
*Nset, nset=m_Set-4
 1,
*Elset, elset=_s_Surf-1_S2, internal, instance=Part-1-1, generate
 1767,  3427,    20
*Surface, type=ELEMENT, name=s_Surf-1
_s_Surf-1_S2, S2
*Elset, elset=_s_Surf-2_S2, internal, instance=Part-1-1, generate
 1767,  3427,    20
*Surface, type=ELEMENT, name=s_Surf-2
_s_Surf-2_S2, S2
** Constraint: Constraint-2
*Coupling, constraint name=Constraint-2, ref node=m_Set-4, surface=s_Surf-2
*Kinematic
*End Assembly
**
** ELEMENT CONTROLS
**
*Section Controls, name=EC-1, ELEMENT DELETION=YES, MAX DEGRADATION=1.
1., 1., 1.
**
** MATERIALS
**
*Material, name=Rubber
*Elastic
200., 0.3
*Material, name=Trapi
*Damage Initiation, criterion=QUADS, position=COMBINED
 0.1, 0.1, 0.1
*Damage Evolution, type=DISPLACEMENT, softening=TABULAR
       0.,          0.
 0.087686, 9.61138e-06
 0.161234, 1.92228e-05
 0.223808, 2.88341e-05
 0.277694, 3.84455e-05
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       1.,   0.0768231
*Damage Stabilization
0.0001
*Elastic, type=TRACTION
1000.,1000.,1000.
*Material, name=Tri
*Damage Initiation, criterion=QUADS
 0.1, 0.1, 0.1
*Damage Evolution, type=ENERGY
 0.005,
*Elastic, type=TRACTION
100.,100.,100.
** ----------------------------------------------------------------
**
** STEP: Step-1
**
*Step, name=Step-1, nlgeom=YES, inc=10000
*Static, stabilize=0.0002, allsdtol=0.05, continue=NO
0.01, 1., 1e-15, 0.1
**
** BOUNDARY CONDITIONS
**
** Name: BC-1 Type: Symmetry/Antisymmetry/Encastre
*Boundary
Set-6, ENCASTRE
** Name: BC-2 Type: Displacement/Rotation
*Boundary
Set-7, 1, 1
Set-7, 2, 2, 0.2
Set-7, 6, 6
**
** OUTPUT REQUESTS
**
*Restart, write, frequency=0
**
** FIELD OUTPUT: F-Output-1
**
*Output, field
*Node Output
CF, RF, RT, U
*Element Output, directions=YES
LE, PE, PEEQ, PEMAG, S, SDEG, STATUS
*Contact Output
CDISP, CSTRESS
**
** HISTORY OUTPUT: H-Output-1
**
*Output, history
*Node Output, nset=RefP
RF2, U2
*End Step
